# OpenSim document version 40600
ExternalLoads:
  datafile: /home/jerry/projects/AgenticSpine/Agentic-Spine/opensim_files/StaticActivities_126/External Forces 126/NMB_ExternalForce2.mot
  ExternalForce RightHandForce: applied_to_body=hand_R force_expressed_in_body=ground point_expressed_in_body=ground
      force_identifier=Hand_R_Force point_identifier=Hand_R_pt
  ExternalForce LeftHandForce: applied_to_body=hand_L force_expressed_in_body=ground point_expressed_in_body=ground
      force_identifier=Hand_L_Force point_identifier=Hand_L_pt
  ExternalForce RightScapForce: applied_to_body=scapula_L force_expressed_in_body=ground point_expressed_in_body=ground
      force_identifier=scapula_R_Force point_identifier=scapula_R_pt
  ExternalForce LeftScapForce: applied_to_body=scapula_R force_expressed_in_body=ground point_expressed_in_body=ground
      force_identifier=scapula_L_Force point_identifier=scapula_L_pt
